*Heading
** Job name: cyl_bck_s4r_160x80 Model name: Model-1
** Generated by: Abaqus/CAE 2017
*Preprint, echo=NO, model=NO, history=NO, contact=NO
**
** PARTS
**
*Part, name=Part-1
*Node
      1,   184.941284,   134.367706,   457.200012
      2,   184.941284,   134.367706,           0.
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*Element, type=S8R
  1,     1,    21,  1031,   200,  9721,  9722,  9723,  9724
  2,    21,    22,  1032,  1031,  9725,  9726,  9727,  9722
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*Elset, elset=_Surf-1_SPOS, internal, generate
  1,  9600,   1
*Surface, type=ELEMENT, name=Surf-1
_Surf-1_SPOS, SPOS
*Distribution, name=Ori-1-DiscOrient, location=ELEMENT, Table=Ori-1-DiscOrient_Table
** Description: Distribution generated from Discrete Orientation
,           1.,           0.,           0.,           0.,           1.,           0.
1,           0.,           0.,           1., 0.608761429786682, -0.793353378772736,           0.
2,           0.,           0.,           1., 0.608761429786682, -0.793353378772736,           0.
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9600,           0.,           0.,           1., 0.0261769499629736, 0.999657332897186,           0.
*Orientation, name=Ori-1, system=RECTANGULAR
Ori-1-DiscOrient
3, 0.
*End Part
**
**
** ASSEMBLY
**
*Assembly, name=Assembly
**
*Instance, name=Part-1-1, part=Part-1
*End Instance
**
*Node
      1,           0.,           0.,           0.
*Node
      2,           0.,           0.,        457.2
*Nset, nset=end-edge-1, instance=Part-1-1
     2,     3,     5,     8,    10,    11
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*Elset, elset=end-edge-1, instance=Part-1-1
   80,  160,  240,  320,  400,  480
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*Nset, nset=end-edge-2, instance=Part-1-1
     1,     4,     6,     7,     9,    12
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*Elset, elset=end-edge-2, instance=Part-1-1
    1,   81,  161,  241,  321,  401
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*Nset, nset=ref-point-1
 1,
*Nset, nset=ref-point-2
 2,
*Surface, type=NODE, name=end-edge-1_CNS_, internal
end-edge-1, 1.
*Surface, type=NODE, name=end-edge-2_CNS_, internal
end-edge-2, 1.
** Constraint: Constraint-1
*Coupling, constraint name=Constraint-1, ref node=ref-point-1, surface=end-edge-1_CNS_
*Kinematic
** Constraint: Constraint-2
*Coupling, constraint name=Constraint-2, ref node=ref-point-2, surface=end-edge-2_CNS_
*Kinematic
*End Assembly
*Distribution Table, name=Ori-1-DiscOrient_Table
coord3D, coord3D
**
** STEP: buckling
**
*Step, name=buckling, nlgeom=NO, perturbation
*Buckle, eigensolver=lanczos
4, , , ,
**
** BOUNDARY CONDITIONS
**
** Name: BC-1 Type: Displacement/Rotation
*Boundary, op=NEW, load case=1
ref-point-1, 1, 1
ref-point-1, 2, 2
ref-point-1, 3, 3
ref-point-1, 5, 5
ref-point-1, 6, 6
*Boundary, op=NEW, load case=2
ref-point-1, 1, 1
ref-point-1, 2, 2
ref-point-1, 3, 3
ref-point-1, 5, 5
ref-point-1, 6, 6
** Name: BC-2 Type: Displacement/Rotation
*Boundary, op=NEW, load case=1
ref-point-2, 1, 1
ref-point-2, 2, 2
ref-point-2, 5, 5
ref-point-2, 6, 6
*Boundary, op=NEW, load case=2
ref-point-2, 1, 1
ref-point-2, 2, 2
ref-point-2, 5, 5
ref-point-2, 6, 6
**
** LOADS
**
** Name: Load-1   Type: Moment
*Cload
ref-point-1, 4,  -1000.
** Name: Load-2   Type: Moment
*Cload
ref-point-2, 4,   1000.
**
** OUTPUT REQUESTS
**
*Restart, write, frequency=0
**
** FIELD OUTPUT: F-Output-1
**
*Output, field, variable=PRESELECT
*End Step
