*Heading
** Job name: plate_sq2_ss_nfx_bkl_40x40_si Model name: Model-1
** Generated by: Abaqus/CAE 2017
*Preprint, echo=NO, model=NO, history=NO, contact=NO
**
** PARTS
**
*Part, name=Part-1
*Node
      1,           1.,           1.,           0.
      2,  0.899999976,           1.,           0.
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*Element, type=S4R
  1,   1,   2,  23,  22
  2,   2,   3,  24,  23
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*Nset, nset=Set-1, generate
   1,  441,    1
*Elset, elset=Set-1, generate
   1,  400,    1
*Elset, elset=_Surf-1_SPOS, internal, generate
   1,  400,    1
*Surface, type=ELEMENT, name=Surf-1
_Surf-1_SPOS, SPOS
*Distribution, name=Ori-1-DiscOrient, location=ELEMENT, Table=Ori-1-DiscOrient_Table
** Description: Distribution generated from Discrete Orientation
,           1.,           0.,           0.,           0.,           1.,           0.
1,           1.,           0.,           0.,           0.,           1.,           0.
2,           1.,           0.,           0.,           0.,           1.,           0.
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400,           1.,           0.,           0.,           0.,           1.,           0.
*Orientation, name=Ori-1, system=RECTANGULAR
Ori-1-DiscOrient
3, 0.
** Section: Section-1
** *Shell Section, elset=Set-1, material=Material-1, orientation=Ori-1
** 0.01, 5
*End Part
**
**
** ASSEMBLY
**
*Assembly, name=Assembly
**
*Instance, name=Part-1-1, part=Part-1
*End Instance
**
*Nset, nset=Set-1, instance=Part-1-1
   1,  21,  22,  42,  43,  63
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*Elset, elset=Set-1, instance=Part-1-1
   1,  20,  21,  40,  41,  60
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*Nset, nset=Set-2, instance=Part-1-1
   1,   2,   3,   4,   5,   6
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*Elset, elset=Set-2, instance=Part-1-1
   1,   2,   3,   4,   5,   6
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*Nset, nset=Set-3, instance=Part-1-1
 221,
*Nset, nset=Set-4, instance=Part-1-1
 211,
*Elset, elset=_SURF-1_E2, internal, instance=PART-1-1, generate
  20,  400,   20
*Elset, elset=_SURF-1_E4, internal, instance=PART-1-1, generate
   1,  381,   20
*Surface, type=ELEMENT, name=SURF-1
_SURF-1_E2, E2
_SURF-1_E4, E4
*End Assembly
*Distribution Table, name=Ori-1-DiscOrient_Table
coord3D, coord3D
**
** MATERIALS
**
** *Material, name=Material-1
** *Elastic
**  1e+08, 0.3
** ----------------------------------------------------------------
**
** STEP: Step-1
**
*Step, name=Step-1, nlgeom=NO, perturbation
*Buckle
10, , 18, 30
**
** BOUNDARY CONDITIONS
**
** Name: fix_center Type: Displacement/Rotation
*Boundary, op=NEW, load case=1
Set-3, 1, 1
Set-3, 2, 2
*Boundary, op=NEW, load case=2
Set-3, 1, 1
Set-3, 2, 2
** Name: fix_rz Type: Displacement/Rotation
*Boundary, op=NEW, load case=1
Set-4, 2, 2
*Boundary, op=NEW, load case=2
Set-4, 2, 2
** Name: simply_supported_xedge Type: Displacement/Rotation
*Boundary, op=NEW, load case=1
Set-1, 3, 3
Set-1, 4, 4
*Boundary, op=NEW, load case=2
Set-1, 3, 3
Set-1, 4, 4
** Name: simply_supported_yedge Type: Displacement/Rotation
*Boundary, op=NEW, load case=1
Set-2, 3, 3
Set-2, 5, 5
*Boundary, op=NEW, load case=2
Set-2, 3, 3
Set-2, 5, 5
**
** LOADS
**
** Name: compression   Type: Shell edge load
*Dsload
Surf-1, EDNOR, 1.
**
** OUTPUT REQUESTS
**
*Restart, write, frequency=0
**
** FIELD OUTPUT: F-Output-1
**
*Output, field, variable=PRESELECT
*End Step
